<Lems>

    <!-- Specify which component to run -->
    <Target component="simnet1"/>

    <!-- Include core NeuroML2 ComponentType definitions -->
    <Include file="PyNN.xml"/>
    <Include file="Cells.xml"/>
    <Include file="Networks.xml"/>
    <Include file="Simulation.xml"/>

    <Include file="Gfluct.nml"/>

    <IF_curr_exp id="IF_curr_exp" cm="1.0" i_offset="0" tau_m="20.0" tau_refrac="5.0"
        tau_syn_E="0.5" tau_syn_I="0.5" v_init="-65" v_reset="-65.0" v_rest="-65.0" v_thresh="-55.0"/>

    <Gfluct id="noisyCurrentSource1" start="1000ms" stop="2000ms" dt="0.05ms" E_e="0mV" E_i="-75mV" g_e0="0.0121 uS" g_i0="0.0573 uS" std_e="0.0030 uS" std_i="0.0066 uS" tau_e="2.728 ms" tau_i="10.49 ms"/>

    <network id="net1">
        <population component="IF_curr_exp" id="Pop0" type="populationList"  size="1">
            <instance id="0">
                <location x="120" y="230" z="567"/>
            </instance>
        </population>

        <inputList id="Gfluct0" component="noisyCurrentSource1" population="Pop0">
            <input id="0" target="../Pop0/0/IF_curr_exp" destination="synapses"/>
        </inputList>

    </network>

    <Simulation id="simnet1" length="3000ms" step="0.05ms" target="net1" seed="54320">

        <!-- works for jLEMS -->
        <OutputFile id="Currents_file" fileName="i_gfluct.dat">
            <OutputColumn id="i" quantity="Pop0/0/IF_curr_exp/synapses:noisyCurrentSource1:0/i"/>
        </OutputFile>
        <OutputFile id="Conductance_file" fileName="g_gfluct.dat">
            <OutputColumn id="g_e" quantity="Pop0/0/IF_curr_exp/synapses:noisyCurrentSource1:0/g_e"/>
            <OutputColumn id="g_e1" quantity="Pop0/0/IF_curr_exp/synapses:noisyCurrentSource1:0/g_e1"/>
            <OutputColumn id="g_i" quantity="Pop0/0/IF_curr_exp/synapses:noisyCurrentSource1:0/g_i"/>
            <OutputColumn id="g_i1" quantity="Pop0/0/IF_curr_exp/synapses:noisyCurrentSource1:0/g_i1"/>
        </OutputFile>
        <!-- bug: input properties cannot currently be recorded using neuron -->

    </Simulation>

</Lems>
